*Heading
** Job name: XFEM_CRACK_COMPOSITE Model name: Model-1
** Generated by: Abaqus/CAE 2022.HF2
*Preprint, echo=NO, model=NO, history=NO, contact=NO
**
** PARTS
**
*Part, name=COMPOSITE
*Node
      1,  -1.60000002,          40.,           0.
      2,          -4.,          40.,           0.
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*Element, type=C3D8R
   1,  591,  653,    3,  435, 2553, 2615, 1965, 2397
   2, 1028,  137,  785,  939, 2990, 2099, 2747, 2901
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*Nset, nset=Set-1, generate
    1,  3924,     1
*Elset, elset=Set-1, generate
    1,  1837,     1
*Orientation, name=Ori-1
          1.,           0.,           0.,           0.,           1.,           0.
3, 90.
** Section: Section-1
*Solid Section, elset=Set-1, orientation=Ori-1, material=COMPOSITE
,
*End Part
**
*Part, name=Part-2
*End Part
**
**
** ASSEMBLY
**
*Assembly, name=Assembly
**
*Instance, name=COMPOSITE-1, part=COMPOSITE
*End Instance
**
*Instance, name=Part-2-1, part=Part-2
         -5.,           0.,           0.
*End Instance
**
*Nset, nset=Set-3, instance=COMPOSITE-1
   65,   66,   67,   68,   69,   70
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*Elset, elset=Set-3, instance=COMPOSITE-1
 230, 231, 253, 261, 274, 275
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*Nset, nset=Set-4, instance=COMPOSITE-1, generate
    1,  3924,     1
*Elset, elset=Set-4, instance=COMPOSITE-1, generate
    1,  1837,     1
*Nset, nset=_PickedSet6, internal, instance=COMPOSITE-1, generate
    1,  3924,     1
*Elset, elset=_PickedSet6, internal, instance=COMPOSITE-1, generate
    1,  1837,     1
*Elset, elset=_Surf-1_S5, internal, instance=COMPOSITE-1
   1,  40, 369, 372, 689, 824, 825, 836, 839, 840
*Elset, elset=_Surf-1_S3, internal, instance=COMPOSITE-1
  34,  39, 684, 685, 687, 688, 828
*Elset, elset=_Surf-1_S6, internal, instance=COMPOSITE-1
 690,
*Elset, elset=_Surf-1_S4, internal, instance=COMPOSITE-1
 742, 821
*Surface, type=ELEMENT, name=Surf-1
_Surf-1_S5, S5
_Surf-1_S3, S3
_Surf-1_S6, S6
_Surf-1_S4, S4
*Enrichment, name=Crack-1, type=PROPAGATION CRACK, elset=_PickedSet6
*End Assembly
**
** MATERIALS
**
*Material, name=COMPOSITE
*Damage Initiation, criterion=MAXS
60.,180.,180.
*Damage Evolution, type=ENERGY, mixed mode behavior=BK, power=2.2
 0.3, 0.8, 0.8
*Damage Stabilization
1e-05
*Elastic, type=ENGINEERING CONSTANTS
150000.,9000.,9000., 0.34, 0.34,  0.4,5000.,5000.
5000.,
*Initial Conditions, type=ENRICHMENT
COMPOSITE-1.1572, 1,Crack-1, 0.28255, -0.577782
COMPOSITE-1.1572, 2,Crack-1, 0.692135, -0.0619841
COMPOSITE-1.1572, 3,Crack-1, 0.0599736, 0.398267
COMPOSITE-1.1572, 4,Crack-1, -0.3957, -0.197757
COMPOSITE-1.1572, 5,Crack-1, 0.28255, -0.577782
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COMPOSITE-1.108, 8,Crack-1, -0.8
** ----------------------------------------------------------------
**
** STEP: Step-1
**
*Step, name=Step-1, nlgeom=NO, inc=10000000
*Static, stabilize=0.0002, allsdtol=0.05, continue=NO
0.01, 1., 1e-09, 1.
**
** BOUNDARY CONDITIONS
**
** Name: BC-1 Type: Symmetry/Antisymmetry/Encastre
*Boundary
Set-3, ENCASTRE
** Name: BC-2 Type: Displacement/Rotation
*Boundary
Set-4, 1, 1
Set-4, 3, 3
Set-4, 4, 4
Set-4, 5, 5
Set-4, 6, 6
**
** LOADS
**
** Name: Load-1   Type: Pressure
*Dsload
Surf-1, P, -100.
**
** INTERACTIONS
**
** Interaction: Int-1
*Enrichment Activation, name=Crack-1, activate=ON
**
** OUTPUT REQUESTS
**
*Restart, write, frequency=0
**
** FIELD OUTPUT: F-Output-1
**
*Output, field
*Node Output
CF, PHILSM, PSILSM, RF, U
*Element Output, directions=YES
LE, LOADSXFEM, PE, PEEQ, PEMAG, S, STATUSXFEM
*Contact Output
CDISP, CSTRESS
**
** HISTORY OUTPUT: H-Output-1
**
*Output, history, variable=PRESELECT
*End Step
