*Heading
** Job name: GOODMAN_MODEL Model name: Model-1_NLGEOM
** Generated by: Abaqus/CAE 2022.HF2
*Preprint, echo=NO, model=NO, history=NO, contact=NO
**
** PARTS
**
*Part, name=SPECIMEN
*Node
      1,  -7.78999996,         -80.,           0.
      2,  -13.3500004,         -80.,           0.
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*Element, type=C3D8R
  1,   65, 1169,   34,    1, 1225, 9073, 1466,   73
  2, 1169, 1170,   35,   34, 9073, 9074, 1465, 1466
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*Nset, nset=Set-1, generate
     1,  15984,      1
*Elset, elset=Set-1, generate
     1,  11880,      1
** Section: Section-1
*Solid Section, elset=Set-1, material=AL2014_T6
,
*End Part
**
**
** ASSEMBLY
**
*Assembly, name=Assembly
**
*Instance, name=SPECIMEN-1, part=SPECIMEN
*End Instance
**
*Nset, nset=Set-1, instance=SPECIMEN-1
    2,    3,    5,    8,    9,   12
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*Elset, elset=Set-1, instance=SPECIMEN-1
     3,    45,    48,    90,    93,   135
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*Nset, nset=Set-2, instance=SPECIMEN-1
    2,    3,    4,    5,    7,    8
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*Elset, elset=Set-2, instance=SPECIMEN-1
     3,    43,    44,    45,    48,    88
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*Nset, nset=Set-3, instance=SPECIMEN-1
   19,   20,   22,   23,   27,   28
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*Elset, elset=Set-3, instance=SPECIMEN-1
  1816,  1819,  1822,  1825,  1828,  1831
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*End Assembly
**
** MATERIALS
**
*Material, name=AL2014_T6
*Elastic
68900., 0.33
*Plastic
330.,   0.
410., 0.13
*Material, name=AL7075
*Elastic
70000., 0.32
*Plastic
480.,   0.
570., 0.07
**
** BOUNDARY CONDITIONS
**
** Name: BC-1 Type: Displacement/Rotation
*Boundary
Set-2, 1, 1
Set-2, 2, 2
Set-2, 3, 3
Set-2, 4, 4
Set-2, 5, 5
Set-2, 6, 6
** ----------------------------------------------------------------
**
** STEP: STATIC
**
*Step, name=STATIC, nlgeom=YES
*Static
1., 1., 1e-05, 1.
**
** BOUNDARY CONDITIONS
**
** Name: BC-2 Type: Displacement/Rotation
*Boundary
Set-3, 2, 2, 1.
**
** OUTPUT REQUESTS
**
*Restart, write, frequency=0
**
** FIELD OUTPUT: F-Output-1
**
*Output, field, variable=PRESELECT
**
** HISTORY OUTPUT: H-Output-1
**
*Output, history, variable=PRESELECT
*End Step
