*Heading
 Crack initiation and propagation in a plate with a hole (XFEM)
** Job name: crack_lefm_xfem Model name: Crack_propagation_lefm
** Generated by: Abaqus/CAE 6.12-DEV
*Preprint, echo=NO, model=NO, history=NO, contact=NO
**
** PARTS
**
*Part, name=plate
*Node
      1, 0.0218218211, -0.00999999978
      2, 0.0218218211, 0.00999999978
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*Element, type=CPE4
 1,  1, 15, 34,  4
 2, 15, 16, 33, 34
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*Nset, nset=All, generate
    1,  2184,     1
*Elset, elset=All, generate
    1,  2060,     1
*Nset, nset=xsymm
   8,   9,  12,  14, 100, 101
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*Elset, elset=xsymm
  240,  260,  280,  300,  320,  340
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*Nset, nset=bottom
   9,  10, 139, 140, 141, 142
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*Elset, elset=bottom, generate
 1001,  1020,     1
*Nset, nset=top
  13,  14, 275, 276, 277, 278
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*Elset, elset=top, generate
 2041,  2060,     1
*Orientation, name=Ori-1
1., 0., 0., 0., 1., 0.
1, 0.
** Section: solid
*Solid Section, elset=All, orientation=Ori-1, material=elas
0.02,
*End Part
**
**
** ASSEMBLY
**
*Assembly, name=Assembly
**
*Instance, name=plate_1, part=plate
*End Instance
**
*Node
      1, 0.0500000007, -0.170000002,           0.
*Node
      2, 0.0500000007,  0.170000002,           0.
*Nset, nset=bdisp
 1,
*Nset, nset=tdisp
 2,
*Nset, nset=rdisp
 1, 2
** Constraint: ce_bot
*Equation
2
plate_1.bottom, 2, 1.
bdisp, 2, -1.
** Constraint: ce_top
*Equation
2
plate_1.top, 2, 1.
tdisp, 2, -1.
*Enrichment, name=enr1, type=PROPAGATION CRACK, elset=plate_1.All, interaction=contact
*End Assembly
*Amplitude, name=Amp-1
             0.,              0.,              1.,              1.
**
** MATERIALS
**
*Material, name=elas
*Damage Initiation, criterion=MAXPS, tolerance=0.01
 2.2e+07,
*Elastic
 3.24e+09, 0.3
**
** INTERACTION PROPERTIES
**
*Surface Interaction, name=contact
1.,
*Surface Behavior
*Fracture Criterion, type=VCCT, mixed mode behavior=POWER, normal direction=MTS, tolerance=0.1, viscosity=1e-05
2870.,2870.,   0.,   1.,   1.,   1.
*FRACTURE CRITERION,TYPE=FATIGUE,MIXED MODE BEHAVIOR=POWER
0.5,-0.1,4.8768E-6,1.15,0.001,,2870.,2870.
0,1.0,1.0,1.0
**
** BOUNDARY CONDITIONS
**
** Name: symm Type: Displacement/Rotation
*Boundary
plate_1.xsymm, 1, 1
** ----------------------------------------------------------------
**
** STEP: Static
**
*amplitude,name=amp1
0,6.72E-3,0.5,1,1.0,6.72E-3
*amplitude,name=amp2
0,0,0.5,1,1.0,0.001
*Step, name=Static, nlgeom=YES, inc=100000
*Static
0.01, 1., 1e-09, 0.01
**
** BOUNDARY CONDITIONS
**
** Name: bot Type: Displacement/Rotation
*Boundary
bdisp, 2
*cload,amp=amp2
 tdisp, 2, 16800
**
** CONTROLS
**
*Controls, reset
*Controls, analysis=discontinuous
*Controls, parameters=time incrementation
, , , , , , , 20, , ,
**
** OUTPUT REQUESTS
**
*Restart, write, frequency=0
**
** FIELD OUTPUT: F-Output-1
**
*Output, field
*Node Output
PHILSM, RF, U
*Element Output, directions=YES
LE, S, STATUSXFEM
**
** HISTORY OUTPUT: H-Output-2
**
*Output, history
*Node Output, nset=rdisp
RF2, U2
**
** HISTORY OUTPUT: H-Output-1
**
*Output, history, variable=PRESELECT
*End Step
*Step,inc=10000
*direct cyclic,fatigue
0.01,1,,,25,25,,30
3,6,50,1.1
*controls,type=direct cyclic
,100,1E-3,100,1E-3
*cload,amp=amp1,op=new
 tdisp, 2, 2500
** bdisp, 2,-2500
*output,field, freq=50
*node output
 u,philsm
*element output
 s, statusxfem,enrrtxfem
*output,history,freq=50
*node output, nset=rdisp
 u2, rf2
*end step
